// COMSOL Multiphysics 5.6.0.401 model "top.mph"
// Outline of the model tree

Parameters
  ramp = 0

Geometry
  geom1 "Geometry 1" (3D, length unit mm)
    imp1: Import | type = cad; filename = D:\Study Materials\Thesis\New_design\top.STEP; unit = source
    fin: Finalize "Form Union"

Physics
  solid: SolidMechanics on all domains
    dependent variable u = {u, v, w}
    lemm1: LinearElasticModel "Linear Elastic Material 1" (default)
    free1: Free (default)
    init1: init "Initial Values 1" (default)
    hmm1: HyperelasticModel "Hyperelastic Material 1" on domains 1
      MaterialModel = Yeoh
      Compressibility_Yeoh = Incompressible
      c1YE_mat = userdef
      c1YE = 12700
      c2YE_mat = userdef
      c2YE = 423
      c3YE_mat = userdef
      c3YE = -1.46
      rho_mat = userdef
      rho = 1070
    fix1: Fixed "Fixed Constraint 1" on boundaries 1
    bndl1: BoundaryLoad on boundaries 6-14, 19-26, 31-38, 43-50, 55-62, 67-74, 79-86, 91-98, 103-110, 115-119
      LoadType = FollowerPressure
      FollowerPressure = 10000*ramp
    gr1: Gravity on domains 1

Mesh
  mesh1 "Mesh 1" (physics-controlled)
    size: MeshSizeDefault | hauto = 6

Studies
  std1 "Study 1"
    stat: Stationary | useparam = on; pname = ramp; plistarr = range(0.025,0.025,1)

Solver configurations
  sol1 "Solution 1" (study std1)
    v1: Variables "Dependent Variables 1"
    s1: Stationary "Stationary Solver 1"
      p1: Parametric
      fc1: FullyCoupled | linsolver = d1
      d1: Direct "Suggested Direct Solver (solid)" | linsolver = pardiso; pivotperturb = 1.0E-9; nliniterrefine = on

Datasets
  dset1: Solution | solution = sol1